# OpenSim document version 40500
ScaleTool AOT_scaled:
  mass: 69.2 [kg]
  height: -1
  age: -1
  GenericModelMaker:
    model_file: wholebodyFlo.osim
  ModelScaler:
    apply: true
    scaling_order: measurements
    marker_file: static.trc
    time_range: 0 5.3
    preserve_mass_distribution: false
    output_model_file: scaled.osim
    output_scale_file: scaling_factors.osim
    MeasurementSet:
      Measurement pelvis: apply=true
        MarkerPair: markers=(RASIS LASIS)
        MarkerPair: markers=(LPSIS RPSIS)
        MarkerPair: markers=(RASIS RPSIS)
        MarkerPair: markers=(LASIS LPSIS)
        MarkerPair: markers=(LASIS RPSIS)
        MarkerPair: markers=(RASIS LPSIS)
        BodyScale pelvis: axes=(X Y Z)
      Measurement femur_r: apply=true
        MarkerPair: markers=(RASIS RLFE)
        MarkerPair: markers=(RPSIS RLFE)
        MarkerPair: markers=(RASIS RMFE)
        MarkerPair: markers=(RPSIS RMFE)
        MarkerPair: markers=(RMFE RLFE)
        MarkerPair: markers=(LASIS LLFE)
        MarkerPair: markers=(LPSIS LLFE)
        MarkerPair: markers=(LASIS LMFE)
        MarkerPair: markers=(LPSIS LMFE)
        MarkerPair: markers=(LMFE LLFE)
        BodyScale femur_r: axes=(X Y Z)
      Measurement tibia_r: apply=true
        MarkerPair: markers=(RSPH RMFE)
        MarkerPair: markers=(RLM RLFE)
        MarkerPair: markers=(LSPH LMFE)
        MarkerPair: markers=(LLM LLFE)
        BodyScale tibia_r: axes=(X Y Z)
      Measurement calcn_r: apply=true
        MarkerPair: markers=(RCAL RMFH1)
        MarkerPair: markers=(RMFH5 RCAL)
        MarkerPair: markers=(RMFH5 RMFH1)
        MarkerPair: markers=(RTT2 RMFH1)
        MarkerPair: markers=(RMFH5 RTT2)
        MarkerPair: markers=(LCAL LMFH1)
        MarkerPair: markers=(LMFH5 LCAL)
        MarkerPair: markers=(LMFH5 LMFH1)
        MarkerPair: markers=(LTT2 LMFH1)
        MarkerPair: markers=(LMFH5 LTT2)
        BodyScale calcn_r: axes=(X Y Z)
      Measurement talus_r: apply=true
        MarkerPair: markers=(RCAL RMFH1)
        MarkerPair: markers=(RMFH5 RCAL)
        MarkerPair: markers=(RMFH5 RMFH1)
        MarkerPair: markers=(RTT2 RMFH1)
        MarkerPair: markers=(RMFH5 RTT2)
        MarkerPair: markers=(LCAL LMFH1)
        MarkerPair: markers=(LMFH5 LCAL)
        MarkerPair: markers=(LMFH5 LMFH1)
        MarkerPair: markers=(LTT2 LMFH1)
        MarkerPair: markers=(LMFH5 LTT2)
        BodyScale talus_r: axes=(X Y Z)
      Measurement toes_r: apply=true
        MarkerPair: markers=(RCAL RMFH1)
        MarkerPair: markers=(RMFH5 RCAL)
        MarkerPair: markers=(RMFH5 RMFH1)
        MarkerPair: markers=(RTT2 RMFH1)
        MarkerPair: markers=(RMFH5 RTT2)
        MarkerPair: markers=(LCAL LMFH1)
        MarkerPair: markers=(LMFH5 LCAL)
        MarkerPair: markers=(LMFH5 LMFH1)
        MarkerPair: markers=(LTT2 LMFH1)
        MarkerPair: markers=(LMFH5 LTT2)
        BodyScale toes_r: axes=(X Y Z)
      Measurement torso: apply=true
        MarkerPair: markers=(STR SUP)
        MarkerPair: markers=(C7 T10)
        MarkerPair: markers=(T10 STR)
        MarkerPair: markers=(SUP C7)
        MarkerPair: markers=(RASIS RA)
        MarkerPair: markers=(LASIS LA)
        MarkerPair: markers=(RPSIS RA)
        MarkerPair: markers=(LPSIS LA)
        MarkerPair: markers=(RA LA)
        MarkerPair: markers=(RASIS LASIS)
        BodyScale torso: axes=(X Y Z)
      Measurement head_and_neck: apply=true
        MarkerPair: markers=(LTEMP RTEMP)
        MarkerPair: markers=(OCC SEL)
        MarkerPair: markers=(C7 HV)
        MarkerPair: markers=(SUP HV)
        BodyScale head_and_neck: axes=(X Y Z)
      Measurement humerus_r: apply=true
        MarkerPair: markers=(RA RLHE)
        MarkerPair: markers=(RA RMHE)
        MarkerPair: markers=(LA LLHE)
        MarkerPair: markers=(LA LMHE)
        BodyScale humerus_r: axes=(X Y Z)
      Measurement ulna_r: apply=true
        MarkerPair: markers=(RLHE RRS)
        MarkerPair: markers=(RMHE RUS)
        MarkerPair: markers=(LLHE LRS)
        MarkerPair: markers=(LMHE LUS)
        BodyScale ulna_r: axes=(X Y Z)
      Measurement radius_r: apply=true
        MarkerPair: markers=(RLHE RRS)
        MarkerPair: markers=(RMHE RUS)
        MarkerPair: markers=(LLHE LRS)
        MarkerPair: markers=(LMHE LUS)
        BodyScale radius_r: axes=(X Y Z)
      Measurement lunate_r: apply=true
        MarkerPair: markers=(RLHE RRS)
        MarkerPair: markers=(RMHE RUS)
        MarkerPair: markers=(LLHE LRS)
        MarkerPair: markers=(LMHE LUS)
        BodyScale lunate_r: axes=(X Y Z)
      Measurement hand_r: apply=true
        MarkerPair: markers=(RRS RUS)
        MarkerPair: markers=(RHMH5 RHMH2)
        MarkerPair: markers=(RUS RHMH5)
        MarkerPair: markers=(RRS RHMH2)
        MarkerPair: markers=(RFT3 RUS)
        MarkerPair: markers=(RFT3 RRS)
        MarkerPair: markers=(LRS LUS)
        MarkerPair: markers=(LHMH5 LHMH2)
        MarkerPair: markers=(LUS LHMH5)
        MarkerPair: markers=(LRS LHMH2)
        MarkerPair: markers=(LFT3 LUS)
        MarkerPair: markers=(LFT3 LRS)
        BodyScale hand_r: axes=(X Y Z)
      Measurement fingers_r: apply=true
        MarkerPair: markers=(RRS RUS)
        MarkerPair: markers=(RHMH5 RHMH2)
        MarkerPair: markers=(RUS RHMH5)
        MarkerPair: markers=(RRS RHMH2)
        MarkerPair: markers=(RFT3 RUS)
        MarkerPair: markers=(RFT3 RRS)
        MarkerPair: markers=(LRS LUS)
        MarkerPair: markers=(LHMH5 LHMH2)
        MarkerPair: markers=(LUS LHMH5)
        MarkerPair: markers=(LRS LHMH2)
        MarkerPair: markers=(LFT3 LUS)
        MarkerPair: markers=(LFT3 LRS)
        BodyScale fingers_r: axes=(X Y Z)
      Measurement femur_l: apply=true
        MarkerPair: markers=(RASIS RLFE)
        MarkerPair: markers=(RPSIS RLFE)
        MarkerPair: markers=(RASIS RMFE)
        MarkerPair: markers=(RPSIS RMFE)
        MarkerPair: markers=(RMFE RLFE)
        MarkerPair: markers=(LASIS LLFE)
        MarkerPair: markers=(LPSIS LLFE)
        MarkerPair: markers=(LASIS LMFE)
        MarkerPair: markers=(LPSIS LMFE)
        MarkerPair: markers=(LMFE LLFE)
        BodyScale femur_l: axes=(X Y Z)
      Measurement tibia_l: apply=true
        MarkerPair: markers=(RSPH RMFE)
        MarkerPair: markers=(RLM RLFE)
        MarkerPair: markers=(LSPH LMFE)
        MarkerPair: markers=(LLM LLFE)
        BodyScale tibia_l: axes=(X Y Z)
      Measurement talus_l: apply=true
        MarkerPair: markers=(RCAL RMFH1)
        MarkerPair: markers=(RMFH5 RCAL)
        MarkerPair: markers=(RMFH5 RMFH1)
        MarkerPair: markers=(RTT2 RMFH1)
        MarkerPair: markers=(RMFH5 RTT2)
        MarkerPair: markers=(LCAL LMFH1)
        MarkerPair: markers=(LMFH5 LCAL)
        MarkerPair: markers=(LMFH5 LMFH1)
        MarkerPair: markers=(LTT2 LMFH1)
        MarkerPair: markers=(LMFH5 LTT2)
        BodyScale talus_l: axes=(X Y Z)
      Measurement calcn_l: apply=true
        MarkerPair: markers=(RCAL RMFH1)
        MarkerPair: markers=(RMFH5 RCAL)
        MarkerPair: markers=(RMFH5 RMFH1)
        MarkerPair: markers=(RTT2 RMFH1)
        MarkerPair: markers=(RMFH5 RTT2)
        MarkerPair: markers=(LCAL LMFH1)
        MarkerPair: markers=(LMFH5 LCAL)
        MarkerPair: markers=(LMFH5 LMFH1)
        MarkerPair: markers=(LTT2 LMFH1)
        MarkerPair: markers=(LMFH5 LTT2)
        BodyScale calcn_l: axes=(X Y Z)
      Measurement toes_l: apply=true
        MarkerPair: markers=(RCAL RMFH1)
        MarkerPair: markers=(RMFH5 RCAL)
        MarkerPair: markers=(RMFH5 RMFH1)
        MarkerPair: markers=(RTT2 RMFH1)
        MarkerPair: markers=(RMFH5 RTT2)
        MarkerPair: markers=(LCAL LMFH1)
        MarkerPair: markers=(LMFH5 LCAL)
        MarkerPair: markers=(LMFH5 LMFH1)
        MarkerPair: markers=(LTT2 LMFH1)
        MarkerPair: markers=(LMFH5 LTT2)
        BodyScale toes_l: axes=(X Y Z)
      Measurement humerus_l: apply=true
        MarkerPair: markers=(RA RLHE)
        MarkerPair: markers=(RA RMHE)
        MarkerPair: markers=(LA LLHE)
        MarkerPair: markers=(LA LMHE)
        BodyScale humerus_l: axes=(X Y Z)
      Measurement ulna_l: apply=true
        MarkerPair: markers=(RLHE RRS)
        MarkerPair: markers=(RMHE RUS)
        MarkerPair: markers=(LLHE LRS)
        MarkerPair: markers=(LMHE LUS)
        BodyScale ulna_l: axes=(X Y Z)
      Measurement radius_l: apply=true
        MarkerPair: markers=(RLHE RRS)
        MarkerPair: markers=(RMHE RUS)
        MarkerPair: markers=(LLHE LRS)
        MarkerPair: markers=(LMHE LUS)
        BodyScale radius_l: axes=(X Y Z)
      Measurement lunate_l: apply=true
        MarkerPair: markers=(RLHE RRS)
        MarkerPair: markers=(RMHE RUS)
        MarkerPair: markers=(LLHE LRS)
        MarkerPair: markers=(LMHE LUS)
        BodyScale lunate_l: axes=(X Y Z)
      Measurement hand_l: apply=true
        MarkerPair: markers=(RRS RUS)
        MarkerPair: markers=(RHMH5 RHMH2)
        MarkerPair: markers=(RUS RHMH5)
        MarkerPair: markers=(RRS RHMH2)
        MarkerPair: markers=(RFT3 RUS)
        MarkerPair: markers=(RFT3 RRS)
        MarkerPair: markers=(LRS LUS)
        MarkerPair: markers=(LHMH5 LHMH2)
        MarkerPair: markers=(LUS LHMH5)
        MarkerPair: markers=(LRS LHMH2)
        MarkerPair: markers=(LFT3 LUS)
        MarkerPair: markers=(LFT3 LRS)
        BodyScale hand_l: axes=(X Y Z)
      Measurement fingers_l: apply=true
        MarkerPair: markers=(RRS RUS)
        MarkerPair: markers=(RHMH5 RHMH2)
        MarkerPair: markers=(RUS RHMH5)
        MarkerPair: markers=(RRS RHMH2)
        MarkerPair: markers=(RFT3 RUS)
        MarkerPair: markers=(RFT3 RRS)
        MarkerPair: markers=(LRS LUS)
        MarkerPair: markers=(LHMH5 LHMH2)
        MarkerPair: markers=(LUS LHMH5)
        MarkerPair: markers=(LRS LHMH2)
        MarkerPair: markers=(LFT3 LUS)
        MarkerPair: markers=(LFT3 LRS)
        BodyScale fingers_l: axes=(X Y Z)
  MarkerPlacer:
    apply: true
    marker_file: static.trc
    coordinate_file: static.trc
    time_range: 0 5.3
    output_model_file: scaled.osim
    max_marker_movement: -1
    IKTaskSet:
      IKMarkerTask STR: apply=true weight=0.1
      IKMarkerTask RA: apply=true weight=50
      IKMarkerTask LA: apply=true weight=50
      IKMarkerTask C7: apply=true weight=5
      IKMarkerTask T10: apply=true weight=0.5
      IKMarkerTask SUP: apply=true weight=0.3
      IKMarkerTask RLHE: apply=true weight=5
      IKMarkerTask RMHE: apply=true weight=5
      IKMarkerTask RUS: apply=true weight=10
      IKMarkerTask RRS: apply=true weight=10
      IKMarkerTask RHMH5: apply=true weight=0.5
      IKMarkerTask RHMH2: apply=true weight=0.5
      IKMarkerTask LLHE: apply=true weight=5
      IKMarkerTask LMHE: apply=true weight=5
      IKMarkerTask LUS: apply=true weight=10
      IKMarkerTask LRS: apply=true weight=10
      IKMarkerTask LHMH2: apply=true weight=0.5
      IKMarkerTask LHMH5: apply=true weight=0.5
      IKMarkerTask RASIS: apply=true weight=50
      IKMarkerTask LASIS: apply=true weight=50
      IKMarkerTask LPSIS: apply=true weight=5
      IKMarkerTask RPSIS: apply=true weight=5
      IKMarkerTask RLFE: apply=true weight=10
      IKMarkerTask RMFE: apply=true weight=10
      IKMarkerTask RATT: apply=true weight=0.5
      IKMarkerTask RLM: apply=true weight=10
      IKMarkerTask RSPH: apply=true weight=10
      IKMarkerTask RCAL: apply=true weight=10
      IKMarkerTask RMFH1: apply=true weight=10
      IKMarkerTask RMFH5: apply=true weight=10
      IKMarkerTask RGT: apply=true weight=0.1
      IKMarkerTask LGT: apply=true weight=0.1
      IKMarkerTask LLFE: apply=true weight=10
      IKMarkerTask LMFE: apply=true weight=10
      IKMarkerTask LATT: apply=true weight=0.5
      IKMarkerTask LLM: apply=true weight=10
      IKMarkerTask LSPH: apply=true weight=10
      IKMarkerTask LCAL: apply=true weight=10
      IKMarkerTask LMFH1: apply=true weight=10
      IKMarkerTask LMFH5: apply=true weight=10
      IKMarkerTask SEL: apply=true weight=1
      IKMarkerTask OCC: apply=true weight=1
      IKMarkerTask RTEMP: apply=true weight=1
      IKMarkerTask LTEMP: apply=true weight=1
      IKMarkerTask RTT2: apply=true weight=1
      IKMarkerTask LTT2: apply=true weight=1
      IKMarkerTask RFT3: apply=true weight=0.5
      IKMarkerTask LFT3: apply=true weight=0.5
      IKMarkerTask HV: apply=true weight=1
